#if ${github_actions:-no} == no
#system gridlabd weather US WA Snohomish --type=tmy3 --start='2020-08-01 00:00:00-07:00' --end='2020-09-01 00:00:00-07:00' --player --model

#include "US_WA_Snohomish_tmy3.glm"

module tape
{
    csv_header_type NAME;

}

clock
{
    timezone PST+8PDT;
    starttime "2020-08-01 00:00:00-07:00";
    stoptime "2020-09-01 00:00:00-07:00";
}

object recorder
{
    parent "US_WA_Snohomish_tmy3";
    file "test_weather.csv";
    property "drybulb,humidity";
    interval -1;
}

#ifexists "../test_weather.csv"
#on_exit 0 diff ../test_weather.csv test_weather.csv > gridlabd.diff
#endif
#endif
